# -*- coding: utf-8 -*-
from stlib.physics.deformable import ElasticMaterialObject
from stlib.physics.constraints import FixedBox
from stlib.scene import Node

def Finger(parentNode=None, name="Finger",
           rotation=[0.0, 0.0, 0.0], translation=[0.0, 0.0, 0.0],
           fixingBox=[0.0,0.0,0.0], pullPointLocation=[0.0,0.0,0.0]):

    finger = Node(parentNode, "Finger")
    eobject = ElasticMaterialObject(finger,
                                   volumeMeshFileName="data/mesh/eth_manipulator.vtk",
                                   poissonRatio=0.3,
                                   youngModulus=18000,
                                   totalMass=0.5,
                                   surfaceColor=[0.0, 0.8, 0.7],
                                   surfaceMeshFileName="data/mesh/eth_manipulator.stl",
                                   rotation=rotation,
                                   translation=translation)

    FixedBox(eobject,
             doVisualization=True,
             atPositions=[-10,-10,-10,10,10,10])


def createScene(rootNode):
    # -*- coding: utf-8 -*-
    from stlib.scene import MainHeader
    from stlib.visuals import ShowGrid
    from stlib.physics.rigid import Floor
    from stlib.physics.rigid import Cube
    m=MainHeader(rootNode, plugins=["SoftRobots"])
    m.getObject("VisualStyle").displayFlags='showForceFields showBehaviorModels showInteractionForceFields'

    ShowGrid(rootNode)
    Finger(rootNode)

    return rootNode
